# Hex xtal + ligands + ligand-xtal interactions

# initialization
units 		real
boundary 	p p p

atom_style	molecular  			# Allows for bonds, angles and torsions to be specified.
bond_style 	harmonic			# E = K(r-r0)^2
angle_style	harmonic			# E = K(t-t0)^2
dihedral_style	opls				# E = K1/2(1+cos(phi)) + K2/2(1-cos(2phi)) + K3/2(1+cos(3phi))
# atom_modify first command may be useful for full system, put ligands first

variable	TargetT equal 340

read_data	file.txt
# read_restart	restart.340
#read_restart	../restart.${TargetT}

group 		ligand/solvent type 1 2 5 6
group		ligand type 1 2
group		solvent type 5 6
group		xtal type 3 4

compute		MyTemp ligand/solvent temp

# change_box	all y scale 2 remap units box

variable	xlo equal 0
variable	xhi equal 82
variable	ylo equal 35
variable	yhi equal 50
variable 	zlo equal 0
variable	zhi equal 81
region		BulkSolv block ${xlo} ${xhi} ${ylo} ${yhi} ${zlo} ${zhi} side in units box
#region		Cell block EDGE EDGE 78 EDGE EDGE EDGE side in units box
#variable	NSolv equal count(solvent,Cell)


# Main run

pair_style	lj/cut 14.0			# Cutoff distance in A for the LJ potential.

pair_modify 	shift yes mix arithmetic	# Shift the potential at the cutoff and use
						# arithmetic mixing rules to determine the
						# interaction parameters for different 'atom'
						# types.

pair_coeff	1 1 0.195  3.75			# For i-j interactions, define eps_ij and sigma_ij
pair_coeff	1 3 0.143  3.54
pair_coeff	1 4 0.143  3.54
pair_coeff	2 2 0.0914 3.95
pair_coeff	2 3 0.111  3.54
pair_coeff	2 4 0.111  3.54
pair_coeff	3 3 0.0    0.0
pair_coeff	3 5 0.143 3.54
pair_coeff	3 6 0.111 3.54
pair_coeff	4 4 0   0.0
pair_coeff	4 5 0.143 3.54
pair_coeff	4 6 0.111 3.54
pair_coeff	5 5 0.195 3.75
pair_coeff	6 6 0.0914 3.95

bond_coeff	* 95.9 1.54			# For all bonds, define K and r0

angle_coeff	* 62.1 114			# For all angles, define K and theta0

dihedral_coeff	* 1.4114 -0.2711 3.1458 0	# For all dihedrals, define Ki, note that K4=0 needs to be defined

#special_bonds	lj 0.0 0.0 0.0			# For some reason this command produces an error message complaining that the number of arguments is incorrect. Since the default should be the same I have left it out.
						# Turns off the lj interaction btw 1st, 2nd,
						# and 3rd nearest neighbours.

thermo		10
thermo_style	custom step temp c_MyTemp etotal ke pe
#thermo_modify 	flush yes

compute		1 all property/local batom1 batom2 btype
reset_timestep	1
fix		1 ligand/solvent nvt temp ${TargetT} ${TargetT} 50
fix_modify	1 temp MyTemp
# fix		2 all deform 100 y final -70.0 70.0
fix		2 all deform 100 y vel 0.0005 units box remap x
fix		plumed all plumed plumedfile cosine.plu outfile cosine.out
dump		1 all xyz 10 dump.${TargetT}
# dump		1 all local 10 dump.${TargetT} index c_1[1] c_1[2] c_1[3]
# dump		1 all atom 10 dump.${TargetT}
run		500 post no
unfix		2
# run		50000 post no
# write_restart	restart.file
unfix		1
undump		1
